# Modified input file for producing initial structure with consideration for cores and bridges

# Initial settings
units metal
dimension 3
boundary p p p
atom_style charge

# variables
variable latparam equal 3.945
variable scale equal sqrt(145)
variable nx equal 5		# keep same x length
variable ny equal 1		# changed from 3
variable nz equal 2		# z thickness to 4

variable xmin equal 0
variable xmax equal "v_nx*v_scale*v_latparam"
variable ymin equal "-3*v_ny*v_scale*v_latparam"  # Tripled ymin
variable ymax equal "v_ny*v_scale*v_latparam"
variable zmin equal 0
variable zmax equal "v_nz*v_latparam"

variable xcenter equal "(v_xmin+v_xmax)/2"
variable ycenter equal 0		       # Updated ycenter
variable zcenter equal "(v_zmin+v_zmax)/2"

variable disp_x equal "v_latparam*v_scale*0.0"
variable disp_z equal "v_latparam*0.0"

region whole block ${xmin} ${xmax} ${ymin} ${ymax} ${zmin} ${zmax} units box
create_box 3 whole

region lower block INF INF ${ymin} ${ycenter} INF INF units box

lattice custom 1 &
        orient x 114 -1 0 orient y 1 114 0 orient z 0 0 1 &
        a1 ${latparam} 0 0 a2 0 ${latparam} 0 a3 0 0 ${latparam} &
        basis 0 0 0 &
        basis 0.5 0.5 0.5 &
        basis 0.0 0.5 0.5 &
        basis 0.5 0.0 0.5 &
        basis 0.5 0.5 0.0

create_atoms 1 region lower &
               basis 1 1 &
               basis 2 2 &
               basis 3 3 &
               basis 4 3 &
               basis 5 3

region upper block INF INF ${ycenter} ${ymax} INF INF units box

lattice custom 1 &
        orient x 114 1 0 orient y -1 114 0 orient z 0 0 1 &
        a1 ${latparam} 0 0 a2 0 ${latparam} 0 a3 0 0 ${latparam} &
        basis 0 0 0 &
        basis 0.5 0.5 0.5 &
        basis 0.0 0.5 0.5 &
        basis 0.5 0.0 0.5 &
        basis 0.5 0.5 0.0

create_atoms 1 region upper &
               basis 1 1 &
               basis 2 2 &
               basis 3 3 &
               basis 4 3 &
               basis 5 3

# Group regions
group lower region lower
group upper region upper

# No displacements needed for grain boundary yet
# No additional rotations needed

# Set masses and charges
mass 1 87.62000000
mass 2 47.86700000
mass 3 15.99900000

set type 1 charge 1.2
set type 2 charge 2.4
set type 3 charge -1.2

# Potential settings (required but not important)
pair_style lj/cut 2.5
pair_coeff * * 1 1

# Delete overlap atoms
variable cutoff equal 0.0 # Modify cutoff as needed
delete_atoms overlap ${cutoff} lower upper

# Reset ion charges
group negative type 3
group positive subtract all negative
variable totalCharge equal charge(all)
variable numofpositive equal count(positive)
variable numofnegative equal count(negative)
variable positiveCharge equal "0.5*v_totalCharge/v_numofpositive"
variable negativeCharge equal "0.5*v_totalCharge/v_numofnegative"
variable charge1 equal "1.2-v_positiveCharge"
variable charge2 equal "2.4-v_positiveCharge"
variable charge3 equal "-1.2-v_negativeCharge"

print "----------charge information------------"
print "total charge is now ${totalCharge}"
print "positive charge is now ${positiveCharge}"
print "negative charge is now ${negativeCharge}"
print "charge1 is now ${charge1}"
print "charge2 is now ${charge2}"
print "charge3 is now ${charge3}"

variable num_of_atoms equal count(all)
print "${cutoff} ${charge1} ${charge2} ${charge3} ${num_of_atoms}" append charge.txt

set type 1 charge ${charge1}
set type 2 charge ${charge2}
set type 3 charge ${charge3}

write_data SrTiO3_${cutoff}.data nocoeff
